// COMSOL Multiphysics 6.0.0.318 model "datacircle_geselowitz1.mph"
// Outline of the model tree

Geometry
  geom1 "几何 1" (2D, length unit m)
    imp1: Import "导入 1"
      type = native
      filename = C:\Users\Zone\Desktop\generate_data\EMP16.mphbin
      meshfilename = C:\Users\Zone\Desktop\generate_data\EMP16.mphbin
    fin: Finalize "形成联合体"

Materials
  mat1: Common "Titanium beta-21S" on domains 1-16
    def "Basic"
      relpermeability = 1
      electricconductivity = 7.407e5[S/m]
      thermalexpansioncoefficient = 7.06e-6[1/K]
      heatcapacity = 710[J/(kg*K)]
      relpermittivity = 1
      density = 4940[kg/m^3]
      thermalconductivity = 7.5[W/(m*K)]
    Enu "Young's modulus and Poisson's ratio"
      E = 105e9[Pa]
      nu = 0.33
  mat2: Common "Water, liquid" on domains 17
    def "Basic"
      thermalexpansioncoefficient = alpha_p(T)
      bulkviscosity = muB(T)
      dynamicviscosity = eta(T)
      ratioofspecificheat = gamma_w(T)
      electricconductivity = 2[S/m]
      heatcapacity = Cp(T)
      density = rho(T)
      thermalconductivity = k(T)
      soundspeed = cs(T)
      relpermittivity = 80
      eta: Piecewise
        arg = T
        pieces = 
          {273.15, 413.15, 1.3799566804-0.021224019151*T^1+1.3604562827E-4*T^2-4.6454090319E-7*T^3+8.9042735735E-10*T^4-9.0790692686E-13*T^5+3.8457331488E-16*T^6}
          {413.15, 553.75, 0.00401235783-2.10746715E-5*T^1+3.85772275E-8*T^2-2.39730284E-11*T^3}
        argunit = K
        fununit = Pa*s
      Cp: Piecewise | arg = T; pieces = {273.15, 553.75, 12010.1471-80.4072879*T^1+0.309866854*T^2-5.38186884E-4*T^3+3.62536437E-7*T^4}; argunit = K; fununit = J/(kg*K)
      rho: Piecewise
        arg = T
        smooth = contd1
        pieces = 
          {273.15, 293.15, 6.3092789034e-05*T^3-0.0603676398829*T^2+18.9229382407066*T-950.704055329848}
          {293.15, 373.15, 1.0335053319e-05*T^3-0.0133950656345*T^2+4.96928883266*T+432.257114008512}
        argunit = K
        fununit = kg/m^3
      k: Piecewise | arg = T; pieces = {273.15, 553.75, -0.869083936+0.00894880345*T^1-1.58366345E-5*T^2+7.97543259E-9*T^3}; argunit = K; fununit = W/(m*K)
      cs: Interpolation | table = {{273, 1403}, {278, 1427}, {283, 1447}, {293, 1481}, {303, 1507}, {313, 1526}, {323, 1541}, {333, 1552}, {343, 1555}, {353, 1555}, {363, 1550}, {373, 1543}}; interp = piecewisecubic; fununit = m/s; argunit = K
      an1: Analytic | funcname = alpha_p; expr = -1/rho(T)*d(rho(T),T); args = T; fununit = 1/K; argunit = K
      an2: Analytic | funcname = gamma_w; expr = 1+(T/Cp(T))*(alpha_p(T)*cs(T))^2; args = T; fununit = 1; argunit = K
      an3: Analytic | funcname = muB; expr = 2.79*eta(T); args = T; fununit = Pa*s; argunit = K

Physics
  ec: ConductiveMedia "电流" on all domains
    dependent variable V
    cucn1: CurrentConservation "电流守恒 1" (default)
    ein1: ElectricInsulation "电绝缘 1" (default)
    init1: init "初始值 1" (default)
    gnd1: Ground "接地 1" on points 41
    term1: Terminal "终端 1" on boundaries 43 | I0 = 1
    term2: Terminal "终端 2" on boundaries 48 | I0 = -1

Mesh
  mesh1 "网格 1" (physics-controlled)
    size: MeshSizeDefault "大小" | hauto = 2

Studies
  std1 "研究 1"
    stat: Stationary "稳态"

Solver configurations
  sol1 "解 1" (study std1)
    v1: Variables "因变量 1"
    s1: Stationary "稳态求解器 1"
      dDef: Direct "直接"
      fc1: FullyCoupled "全耦合 1" | linsolver = dDef

Datasets
  dset1: Solution | solution = sol1

Plots
  pg1: PlotGroup2D "电势 (ec)" | data = dset1
    surf1: Surface "表面 1" | expr = V
  pg2: PlotGroup2D "场强" | data = dset1
    surf1: Surface "表面 1" | data = dset1; expr = ec.normE; descr = 电场模

Exports
  plot1: Plot "绘图 1" | filename = C:\Users\zekun\Desktop\x1.txt